#python -m fit_filter -o=power.csv -i=weather.csv -c=load_model_config.py -C=output -P=weather.csv -g=/tmp/test.glm -k=2 -R=output.csv

#include "/tmp/test.glm"

clock {
	timezone "PST+8PDT";
	starttime "2017-09-01 00:00:00";
	stoptime "2017-10-01 00:00:00";
}
